# ------ 3D hopper ------ #

dimension          3
units              lj
atom_style         rheo
boundary           f s f
comm_modify        vel yes
newton off
comm_style          tiled


# ------ Create simulation box ------ #

# variable           sf equal 0.05
variable           sf equal 0.25
variable           n equal 1.0/(${sf}^3)
variable           cut equal 3.0*${sf}

region             box block -20 20 -10 10 -20 20 units box
create_box         2 box
# lattice            bcc ${n}
lattice            sc ${n}

# region             interior block -3 3 0.01 3 -3 3 units box
region             interior block -0.5 0.5 0.0 1 -3 3 units box

create_atoms       1 region interior

group              fluid type 1

# ------ Model parameters ------ #

variable           rho0 equal 1.0
# variable           rho0 equal 1500.0
variable           mp equal ${rho0}/${n}
variable           cs equal 10
variable           zeta equal 1
variable           Dr equal 0.1*${cut}*${cs}
# variable           dt_max equal 1e-5
variable           dt_max equal 1e-4
variable           g equal 0.0245
# variable           g equal 9.81
# variable           fext equal ${g}/${n}
variable           fext equal ${g}
variable           eta equal 0.05

mass               * ${mp}
variable           d0 atom (${rho0}*${g}*(20-y)/${cs}/${cs})+${rho0}
set                group all rheo/rho ${rho0}
set                group fluid rheo/rho v_d0

set                group all rheo/status 0
# set                group rig rheo/status 2

timestep           ${dt_max}

# pair_style         rheo ${cut} artificial/visc ${zeta} rho/damp ${Dr}
pair_style         rheo/granular ${cut} artificial/visc 1.0
pair_coeff         * *


# ------ Fixes & computes ------ #

fix                1 fluid addforce 0.0 -${fext} 0.0
fix                2 all balance 1000 1.1 rcb
fix                3 all rheo ${cut} cubic 32 surface/detection coordination 80 10 density ${rho0} ${rho0}
fix                4 all rheo/viscosity * constant ${eta}
fix                5 all rheo/pressure * linear
fix                6 all rheo/stress

compute            1 all rheo/property/atom rho phase surface surface/n/x surface/n/y
compute            mycompute all rheo/property/atom grad/v/xx grad/v/xy grad/v/yx grad/v/yy


# ------ Output & Run ------ #

thermo             10
thermo_style       custom step time ke press

variable           skin equal 0.2*${cut}
neighbor           ${skin} bin
# neigh_modify       one 5000
neigh_modify       one 500

# dump               1 all custom 200 atomDump id type x y vx vy fx fy c_1[*]
# dump               1 all custom 100 atomDump_periodic id type x y vx vy fx fy c_1[*] c_4_compute[*] c_mycompute[*]
dump               1 all custom 1 atomDump_periodic id type x y z vx vy vz fx fy fz c_1[*] c_6_compute[*] c_mycompute[*]
# dump               dmpvtk all vtk 10 dump/dump*.vtk id type x y z vx vy vz fx fy fz

# run                400000
# run                1000
# run                100000
run                9000
